units metal
dimension 3
plugin load libdeepmd_lmp.so #for deepmd-v3 only

boundary p p p
box tilt large
atom_style atomic
atom_modify map array
shell mkdir lmp_output
# ---------- input data to read ---------------------
read_data /home/jsp1/AlP/lmp_product/C_AlPNT53_heating/minimized.data

#replicate 1 1 10
#write_data dup_1_1_10.data #if needed


variable timesize equal 0.0002
variable start_temp equal 10.0
variable end_temp equal 400.0

variable press equal 0.0
variable tdamp equal ${timesize}*100
variable pdamp equal ${timesize}*1000
timestep ${timesize}

# ---------- Define Interatomic Potential ---------------------
pair_style deepmd /home/jsp1/AlP/dp_train_new/dp_train/graph01/graph-compress01.pb
pair_coeff * *

#----------------------------------------------
neighbor 1.0 bin
neigh_modify delay 10 every 5 check yes one 5000

#-----------------minimize---------------------
shell cd lmp_output
fix 5 all box/relax z 0.0
thermo 100
thermo_style custom step density pxx pyy pzz pe
dump 1 all custom 200 MIN_*.cfg id type x y z xu yu zu
minimize 0.0 0.0 2000 2000
unfix 5
undump 1
shell cd ..

write_data after_minimize.data

shell cd lmp_output
reset_timestep 0
# Define a compute to calculate per-atom potential energy
compute pe_atom all pe/atom
compute avg_pe all reduce ave c_pe_atom

velocity all create ${start_temp} 89759 mom yes rot yes dist gaussian
velocity all scale ${start_temp}

thermo 200
thermo_style custom step temp density pxx pyy pzz c_avg_pe

# Print headers for the CSV file
print "step,temp,density,pxx,pyy,pzz,avg_pe" file DLP.csv screen no
fix 1 all npt temp ${start_temp} ${end_temp} ${tdamp} z ${press} ${press} ${pdamp}
fix printdata all print 100 "$(step),$(temp),$(density),$(pxx),$(pyy),$(pzz),$(c_avg_pe)" append DLP.csv screen no

dump 1 all custom 200 NPT_*.cfg id type x y z xu yu zu
run 200000
unfix 1
unfix printdata
undump 1
shell cd ..

write_data after_NPT.data
print "ALL DONE!"
